Simulations: Version=156
  DataStore
  Experiment
    Simulation Base1
      Clock: Start=1905-06-01; End=2022-06-01
      Summary
      Weather
        FileName=C:\Users\uqgdurri\OneDrive - The University of Queensland\Desktop\PhD\CropGen_WorkingCopy\Dalby-120Years.met
      SoilArbitrator
      Zone Paddock: Area=1; Slope=0; AspectAngle=0; Altitude=50
        Report DailyReport: EventNames=[Clock].DoReport
          VariableNames:
            [Clock].Today
            [Sorghum].Grain.Wt as Yield
            [Sorghum].AboveGround.Wt as Biomass
            [Sorghum].Leaf.LAI
            [Sorghum].Grain.Wt
            [Sorghum].AboveGround.Wt
            [Sorghum].DaysAfterSowing as DaysAfterSowing
            [Sorghum].Phenology.Stage
            [Irrigation].IrrigationApplied
            [Sorghum].Arbitrator.SDRatio as Swdef
            [Sorghum].Phenology.DltTT as TT
        Report HarvestReport
          VariableNames:
            [Clock].Today
            [Flowering].Script.season     as Season
            [Sorghum].Grain.Wt as Yield
            [Sorghum].AboveGround.Wt as Biomass
            [Sorghum].Leaf.LAI as LAI
            [Sorghum].DaysAfterSowing as DaysAfterSowing
            sum of [Sorghum].Root.WaterUptake from [Sorghum].Sowing to [Sorghum].Harvesting as WaterUse
            sum of [Weather].Rain from [Sorghum].Sowing to [Sorghum].Harvesting as Precipitation
            sum of [Sorghum].Leaf.PotentialEP from [Sorghum].Sowing to [Sorghum].Harvesting as Evapotranspiration
            [EnvType].Script.EnvType as EnvType
            sum of [Phenology].ThermalTime from [Sorghum].Sowing to [Sorghum].Flowering as FloweringTT
        Manager ReportOncePerSeason
          Plant = [Sorghum]
          ReportModule = [HarvestReport]
```csharp
using Models.Soils;
using APSIM.Shared.Utilities;
using Models.PMF;
using Models.Interfaces;
using Models.Core;
using System;

namespace Models
{
    /// <summary>
    /// This script will trigger a reporting output when:
    /// 1. The crop is harvested
    /// 2. End of simulation, if crop was not harvested.
    /// </summary>
    [Serializable]
    public class Script : Model
    {
        /// <summary>
        /// Link to summary, used for writing diagnostics.
        /// </summary>
        [Link]
        private ISummary summary = null;

        /// <summary>
        /// Link to the plant. used to prevent reporting when the plant is not alive.
        /// </summary>
        [Description("Report when this plant is harvested")]
        [Display(Type = DisplayType.Model)]
        public IPlant Plant { get; set; }

        /// <summary>
        /// The report module controlled by this script.
        /// </summary>
        [Description("The report module controlled by this script")]
        [Display(Type = DisplayType.Model)]
        public Report ReportModule { get; set; }

        /// <summary>
        /// Boolean flag to prevent us from reporting more than once per growing season.
        /// </summary>
        private bool hasReported = false;

        /// <summary>
        /// Reset all state at start of simulation.
        /// </summary>
        /// <param name="sender">Sending object.</param>
        /// <param name="args">Event data.</param>
        [EventSubscribe("StartOfSimulation")]
        private void Initialise(object sender, EventArgs args)
        {
            summary.WriteMessage(this, "Resetting script state at start of simulation", MessageType.Information);
            Reset();
        }

        /// <summary>
        /// Called when a crop is sown. Resets the hasReported variable so that
        /// reporting can occur again within the new growing season.
        /// </summary>
        /// <param name="sender">Sending object.</param>
        /// <param name="args">Event data.</param>
        [EventSubscribe("Sowing")]
        private void OnSowing(object sender, EventArgs args)
        {
            if (SenderIsOurPlant(sender))
            {
                summary.WriteMessage(this, "Resetting script state on plant sowing", MessageType.Information);
                Reset();
            }
        }

        /// <summary>
        /// Called when any plant in the zone is harvested. Performs a report.
        /// </summary>
        /// <param name="sender">Sending object.</param>
        /// <param name="args">Event data.</param>
        [EventSubscribe("Harvesting")]
        private void OnHarvesting(object sender, EventArgs args)
        {
            if (SenderIsOurPlant(sender))
            {
                summary.WriteMessage(this, "Performing output at harvesting.", MessageType.Information);
                DoOutput();
            }
        }

        /// <summary>
        /// Called when plant is ended. This could happen after harvesting, or after
        /// plant death (ie due to loss of leaf area).
        /// </summary>
        /// <param name="sender">Sending object.</param>
        /// <param name="args">Event data.</param>
        [EventSubscribe("PlantEnding")]
        private void OnPlantEnding(object sender, EventArgs args)
        {
            // If this is being called after harvesting, then hasReported will be true.
            if (SenderIsOurPlant(sender) && !hasReported)
            {
                summary.WriteMessage(this, "Crop has died. Performing output.", MessageType.Information);
                DoOutput();
            }
        }

        /// <summary>
        /// Called at end of simulation. Performs output if it has not already occurred.
        /// </summary>
        /// <param name="sender">Sending object.</param>
        /// <param name="args">Event data.</param>
        [EventSubscribe("EndOfSimulation")]
        private void EndOfSim(object sender, EventArgs e)
        {
            if (Plant.IsAlive)
            {
                summary.WriteMessage(this, "Crop was not harvested. Performing output at end of simulation instead.", MessageType.Information);
                DoOutput();
            }
        }

        /// <summary>
        /// Reset the script to its initial state.
        /// </summary>
        private void Reset()
        {
            hasReported = false;
        }

        /// <summary>
        /// Write output to the datastore.
        /// </summary>
        private void DoOutput()
        {
            if (!hasReported)
            {
                ReportModule.DoOutput();
                hasReported = true;
            }
        }

        /// <summary>
        /// Check if the sender of an event is the plant we're tracking.
        /// </summary>
        /// <param name="sender">The sender object.</param>
        private bool SenderIsOurPlant(object sender)
        {
            return sender is IPlant plant && plant.Name == Plant.Name;
        }
    }
}
```
        Folder Manager folder
          Manager Harvesting rule
```csharp
using Models.Soils;
using System;
using Models.Core;
using Models.PMF;

namespace Models
{
    [Serializable]

    public class Script : Model
    {
        [Link]
        private Clock clock;

        [Link]
        private IPlant crop;

        [EventSubscribe("EndOfDay")]
        private void OnDoCalculations(object sender, EventArgs e)
        {
            if (crop.IsReadyForHarvesting)
            {
                crop.Harvest();
                crop.EndCrop();
            }
        }
    }
}
```
          Manager Variable Sowing (disabled)
            StartDate = 15-nov
            EndDate = 15-nov
            Crop = [Sorghum]
            MinESW = 0
            MinRain = 0
            RainDays = 0
            CultivarName = Buster
            SowingDepth = 25
            RowSpacing = 1000
            Density = 5
            RowConfiguration = Solid
            TilleringMethod = FixedTillering
            Ftn = 1
```csharp
using Models.Interfaces;
using APSIM.Shared.Utilities;
using Models.Utilities;
using Models.Soils;
using Models.PMF;
using Models.Core;
using System;
using Models.Climate;

namespace Models
{
    [Serializable]
    public class Script : Model
    {
        [Link] private Clock Clock;
        [Link] private Fertiliser Fertiliser;
        [Link] private Summary Summary;
        [Link] private Soil Soil;
        [Link] private Zone paddock;
        private Accumulator accumulatedRain;
        [Link]
        private ISoilWater waterBalance;
        
        [Description("Crop")]
        public Plant Crop { get; set; }

        [Description("Start of sowing window (d-mmm)")]
        public string StartDate { get; set; }

        [Description("End of sowing window (d-mmm)")]
        public string EndDate { get; set; }

        [Description("Minimum extractable soil water for sowing (mm)")]
        public double MinESW { get; set; }

        [Description("Accumulated rainfall required for sowing (mm)")]
        public double MinRain { get; set; }

        [Description("Duration of rainfall accumulation (d)")]
        public int RainDays { get; set; }

        [Display(Type = DisplayType.CultivarName)]
        [Description("Cultivar to be sown")]
        public string CultivarName { get; set; }

        [Description("Sowing depth (mm)")]
        public double SowingDepth { get; set; }

        [Description("Row spacing (mm)")]
        public double RowSpacing { get; set; }

        [Description("Sowing Density (/m2)")]
        public double Density { get; set; }
        
        [Description("Enter skip row configuration : ")]
        public RowConfigurationType RowConfiguration { get; set; }

        [Description("Tillering Method")]
        public TilleringMethodType TilleringMethod { get; set; } = 0;

        [Description("Enter Fertile Tiller No. : ")]
        public double Ftn { get; set; }

        public enum TilleringMethodType 
        {
            RuleOfThumb = -1,
            FixedTillering = 0,
            DynamicTillering = 1
        }
        public enum RowConfigurationType 
        {
            Solid, SingleSkip, DoubleSkip
        }
        
        [EventSubscribe("StartOfSimulation")]
        private void OnSimulationCommencing(object sender, EventArgs e)
        {
            accumulatedRain = new Accumulator(this, "[Weather].Rain", RainDays);
        }

        [EventSubscribe("DoManagement")]
        private void OnDoManagement(object sender, EventArgs e)
        {
            accumulatedRain.Update();
            
            if (DateUtilities.WithinDates(StartDate, Clock.Today, EndDate) &&
                !Crop.IsAlive &&
                MathUtilities.Sum(waterBalance.ESW) >= MinESW &&
                accumulatedRain.Sum >= MinRain)
            {
                double population = Density * paddock.Area;
                Crop.Sow(cultivar:CultivarName, population:population, depth:SowingDepth, rowSpacing:RowSpacing, rowConfig: (double)RowConfiguration, tillering:(int)TilleringMethod, ftn:Ftn);
            }
        }
    }
}
```
          Manager Fixed Sowing
            Crop = [Sorghum]
            SowingDate = 15-nov
            CultivarName = Buster
            SowingDepth = 25
            RowSpacing = 1000
            Density = 5
            RowConfiguration = Solid
            TilleringMethod = FixedTillering
            Ftn = 1
```csharp
using Models.Interfaces; 
using APSIM.Shared.Utilities;
using Models.Utilities;
using Models.Soils;
using Models.PMF;
using Models.Core;
using System;
using Models.Climate;

namespace Models
{
    [Serializable]
    public class Script : Model
    {
        [Link] private Clock Clock;       
        [Link] private Zone paddock;
                
        [Description("Crop")]
        public Plant Crop { get; set; }

        [Description("Sowing date (d-mmm)")]
        public string SowingDate { get; set; }

        [Display(Type = DisplayType.CultivarName)]
        [Description("Cultivar to be sown")]
        public string CultivarName { get; set; }

        [Description("Sowing depth (mm)")]
        public double SowingDepth { get; set; }

        [Description("Row spacing (mm)")]
        public double RowSpacing { get; set; }

        [Description("Sowing Density (/m2)")]
        public double Density { get; set; }
        
        [Description("Enter skip row configuration : ")]
        public RowConfigurationType RowConfiguration { get; set; }

        [Description("Tillering Method")]
        public TilleringMethodType TilleringMethod { get; set; } = 0;

        [Description("Enter Fertile Tiller No. : ")]
        public double Ftn { get; set; }

        public enum TilleringMethodType 
        {
            RuleOfThumb = -1,
            FixedTillering = 0,
            DynamicTillering = 1
        }
        public enum RowConfigurationType 
        {
            Solid, SingleSkip, DoubleSkip
        }
        
        [EventSubscribe("DoManagement")]
        private void OnDoManagement(object sender, EventArgs e)
        {
            //CompareDates will take a ddMMM string and add the clock year
            if (DateUtilities.CompareDates(SowingDate, Clock.Today ) == 0 && 
                !Crop.IsAlive)
            {
                double population = Density * paddock.Area;
                Crop.Sow(cultivar:CultivarName, population:population, depth:SowingDepth, rowSpacing:RowSpacing, rowConfig: (double)RowConfiguration, tillering:(int)TilleringMethod, ftn:Ftn);
            }
        }
    }
}
```
        Irrigation
        Fertiliser
        MicroClimate: a_interception=0; b_interception=1; c_interception=0; d_interception=0; SoilHeatFluxFraction=0; MinimumHeightDiffForNewLayer=0; NightInterceptionFraction=0; ReferenceHeight=2
        Soil HRS: SoilType=SouthVertosol_290mm; LocalName=SouthVertosol_290mm; Site=SQ; NearestTown=Unknown; Region=SQ; NaturalVegetation=Unknown; Latitude=0; Longitude=0; YearOfSampling=0
          Physical
            Thickness  BD    AirDry  LL15  DUL   SAT
            150        0.99  0.1     0.29  0.51  0.6
            150        1.06  0.15    0.3   0.5   0.57
            300        1.13  0.25    0.3   0.5   0.54
            300        1.11  0.31    0.31  0.5   0.55
            300        1.12  0.32    0.32  0.49  0.55
            300        1.15  0.33    0.33  0.49  0.53
            300        1.19  0.34    0.34  0.49  0.52
            SoilCrop SorghumSoil: LL=[0.29, 0.3, 0.3, 0.31, 0.32, 0.33, 0.34]; KL=[0.08, 0.08, 0.08, 0.08, 0.06, 0.04, 0.02]; XF=[1, 1, 1, 1, 1, 1, 1]
          WaterBalance SoilWater: SummerDate=1-Nov; SummerU=6; SummerCona=3.5; WinterDate=1-Apr; WinterU=6; WinterCona=3.5; DiffusConst=40; DiffusSlope=16; Salb=0.13; CN2Bare=73; CNRed=20; CNCov=0.8; PSIDul=-100; Thickness=[150, 150, 300, 300, 300, 300, 300]; SWCON=[0.5, 0.5, 0.5, 0.5, 0.5, 0.5, 0.5]
          Organic: FOMCNRatio=50; CarbonUnits=Total
            Thickness  Carbon  SoilCNRatio  FBiom  FInert  FOM
            150        1       12.5         0.03   0.4     347.129
            150        0.5     12.5         0.01   0.5     270.344
            300        0.25    12.5         0      0.6     163.972
            300        0.11    12.5         0      0.7     99.4541
            300        0.11    12.5         0      0.9     60.322
            300        0.11    12.5         0      0.95    36.5871
            300        0.11    12.5         0      0.95    22.1912
          Chemical: Thickness=[150, 150, 300, 300, 300, 300, 300]; PH=[8.2, 8.7, 8.9, 8.1, 8, 8, 8]; PHUnits=Water
          CERESSoilTemperature Temperature
          Nutrient
          Water: Thickness=[150, 150, 300, 300, 300, 300, 300]; InitialValues=[0.51, 0.5, 0.5, 0.5, 0.49, 0.49, 0.49]; RelativeTo=LL15; FilledFromTop=true
          Solute NO3: Thickness=[150, 150, 300, 300, 300, 300, 300]; InitialValuesUnits=ppm; WaterTableConcentration=0; D0=0; DepthConstant=0; MaxDepthSoluteAccessible=0; RunoffEffectivenessAtMovingSolute=0; MaxEffectiveRunoff=0
            InitialValues=[83.6943, 2.6956, 1.26431, 1.28709, 1.2756, 1.24232, 1.20056]
          Solute NH4: Thickness=[150, 150, 300, 300, 300, 300, 300]; InitialValuesUnits=ppm; WaterTableConcentration=0; D0=0; DepthConstant=0; MaxDepthSoluteAccessible=0; RunoffEffectivenessAtMovingSolute=0; MaxEffectiveRunoff=0
            InitialValues=[0.0962963, 0.0899371, 0.0421829, 0.0429429, 0.0425595, 0.0414493, 0.040056]
          Solute Urea: Thickness=[150, 150, 300, 300, 300, 300, 300]; InitialValues=[0, 0, 0, 0, 0, 0, 0]; InitialValuesUnits=kg/ha; WaterTableConcentration=0; D0=0; DepthConstant=0; MaxDepthSoluteAccessible=0; RunoffEffectivenessAtMovingSolute=0; MaxEffectiveRunoff=0
        Plant Sorghum
        SurfaceOrganicMatter: InitialResidueName=sorghum; InitialResidueType=sorghum; InitialResidueMass=1500; InitialStandingFraction=0; InitialCPR=0; InitialCNR=80
        Manager Reset on sowing
          ResetWater = Yes
          ResetNutrients = Yes
          ResetSOM = Yes
```csharp
using Models.Soils.Nutrients;
using APSIM.Shared.Utilities;
using Models.Surface;
using Models.Utilities;
using Models.Soils.Nutrients;
using Models.Soils;
using Models.PMF;
using Models.Core;
using System;
using Models.Interfaces;

namespace Models
{
    [Serializable]
    public class Script : Model
    {

        [Link] private ISoilWater SoilWater;
        [Link] private Nutrient nutrient;
        [Link] private SurfaceOrganicMatter SOM;
        [Link] private Summary Summary;

        [Description("Reset Water? (Yes or No)")]
        public string ResetWater {get;set;}

        [Description("Reset Soil Nutrients? (Yes or No)")]
        public string ResetNutrients {get;set;}

        [Description("Reset Surface Organic Matter? (Yes or No)")]
        public string ResetSOM {get;set;}

        [EventSubscribe("Sowing")]
        private void OnSowing(object sender, EventArgs e)
        {
            if (ResetWater == "Yes")
            {
                Summary.WriteMessage(this, "Reset Water", MessageType.Diagnostic);
                SoilWater.Reset();
            }
            if (ResetNutrients == "Yes")
            {
                Summary.WriteMessage(this, "Reset Nutrients", MessageType.Diagnostic);
                nutrient.Reset();
            }
            if (ResetSOM == "Yes")
            {
                Summary.WriteMessage(this, "Reset Surface OM", MessageType.Diagnostic);
                SOM.Reset();
            }
        }
    }
}
```
        Manager Automatic irrigation based on water deficit
          Crop = [Sorghum]
          AutoIrrigationOn = False
          FASWThreshold = 0.9
          FASWDepth = 600
          weeks = 3
          afterSowing = 2
```csharp
using Models.Interfaces;
using System;
using Models.Core;
using System.Collections.Generic;
using System.Text;
using Models.Soils;
using Models.PMF;
using Models;
using System.Xml.Serialization;
using APSIM.Shared.Utilities;

namespace Models
{
    [Serializable] 
    public class Script : Model
    {
        [Link] private Zone zone;
        [Link] private Irrigation irrigation;
        [Link] private Soil soil;
        [Link]
        private IPhysical soilPhysical;
        [Link]
        private ISoilWater waterBalance;
        public double FASW { get; set; }
        public double WaterDeficit  { get; set; }
    

        [Description("Crop to irrigate")]
        public IPlant Crop { get; set; }
        
        [Description("Auto irrigation on?")]
        public bool AutoIrrigationOn { get; set; }

        [Description("Threshold fraction available water (0-1)")]
        public double FASWThreshold { get; set; }

        [Description("Soil depth (mm) to which fraction available water is calculated")]
        public double FASWDepth { get; set; }

        [Description("Minimum weeks between irrigations")]
        public double weeks { get; set; }

        [Description("Minimum days after sowing for first irrigation")]
        public int afterSowing { get; set; }

        private double irrigationGap = 0;    // gap between irrigations

        [EventSubscribe("DoManagement")]
        private void OnDoManagement(object sender, EventArgs e)
        {
            if (AutoIrrigationOn && Crop.IsAlive)
            {
                   irrigationGap += 1;                // increment gap between irrigations
                CalculateFASW();                // calc FASW and WaterDeficit
                if ((FASW < FASWThreshold) && (irrigationGap >= weeks * 7))
                {
                    irrigation.Apply(WaterDeficit, depth: 0);
                    irrigationGap = 0;            // reset
                }
            }
            else
            {
                irrigationGap = weeks * 7 - afterSowing - 1;    // allow irrigation a number of days after it becomes alive/sown
            }
        }

        // Calculate the fraction of the potential available sw
        // Calculate the deficit amount from DUL
        private void CalculateFASW()
        {
            double[] LL15 = MathUtilities.Multiply(soilPhysical.LL15, soilPhysical.Thickness);
            double[] DUL = MathUtilities.Multiply(soilPhysical.DUL, soilPhysical.Thickness);
        
            int nlayr = GetLayerIndex(FASWDepth);
            double cumdep = MathUtilities.Sum(soilPhysical.Thickness, 0, nlayr, 0.0);    // tricky function that sums up to before nlayr

            double part_layer = MathUtilities.Divide((FASWDepth - cumdep), soilPhysical.Thickness[nlayr], 0.0);

            // note that results may be strange if swdep < ll15
            double avail_sw = (MathUtilities.Sum(waterBalance.SWmm, 0, nlayr, 0.0) + part_layer * waterBalance.SWmm[nlayr])
                            - (MathUtilities.Sum(LL15, 0, nlayr, 0.0) + part_layer * LL15[nlayr]);

            double pot_avail_sw = (MathUtilities.Sum(DUL, 0, nlayr, 0.0) + part_layer * DUL[nlayr])
                                - (MathUtilities.Sum(LL15, 0, nlayr, 0.0) + part_layer * LL15[nlayr]);
            
            FASW = MathUtilities.Divide(avail_sw, pot_avail_sw, 0.0);
            WaterDeficit = MathUtilities.Constrain(pot_avail_sw - avail_sw, 0.0, 100000);
        }

        // Get index of the layer that has this depth in it 
        private int GetLayerIndex(double pointDepth)
        {
            double[] cumThickness = soilPhysical.ThicknessCumulative;
            int layerIdx = 0;
            while ((layerIdx < cumThickness.Length) && (pointDepth > cumThickness[layerIdx]))
            {
                layerIdx += 1;
            }

            return layerIdx;
        }
    }
}
```
        Manager Fertilise at sowing
          Crop = [Sorghum]
          FertiliserType = NO3N
          Amount = 160
```csharp
using Models.Soils;
using System;
using Models.Core;
using Models.PMF;
namespace Models
{
    [Serializable]
    public class Script : Model
    {
        [Link] Clock Clock;
        [Link] Fertiliser Fertiliser;
        
        [Description("Crop to be fertilised")]
        public IPlant Crop { get; set; }

        [Description("Type of fertiliser to apply? ")] 
        public Fertiliser.Types FertiliserType { get; set; }
    
        [Description("Amount of fertiliser to be applied (kg/ha)")]
        public double Amount { get; set; }
        
        [EventSubscribe("Sowing")]
        private void OnSowing(object sender, EventArgs e)
        {
            Model crop = sender as Model;
            if (Crop != null && crop.Name.ToLower() == (Crop as IModel).Name.ToLower())
                Fertiliser.Apply(Amount: Amount, Type: FertiliserType);
        }
    }
}
```
        Manager EnvType
```csharp
using Models.Soils;
using APSIM.Shared.Utilities;
using Models.PMF.Phen;
using Models.PMF.Organs;
using Models.PMF.Interfaces;
using Models.PMF;
using Models.Functions;
using Models.Interfaces;
using Models.Core;
using System.Collections.Generic;
using System;


// Translated from https://github.com/APSIMInitiative/APSIMClassic/blob/8c824210c1d80fd1a51243dd52d1e6e4bd1708f4/Model/Sorghum/Water.cpp#L472
namespace Models
{
    [Serializable]
    public class Script : Model
    {
        [Link] IClock Clock;
        //[Link] Plant Sorghum;
        [Link(ByName = true)] private Plant Sorghum;
        [Link(Type = LinkType.Path, Path = "[Sorghum].Phenology")] private Phenology phenology;
        [Link(Type = LinkType.Path, Path = "[Sorghum].Arbitrator.SDRatio")] private VariableReference sdrv;
        [Link(Type = LinkType.Path, Path = "[Sorghum].Phenology.DltTT")] private IFunction dttf;

        List<double> dailyWaterSD;
        List<double> dailyTT;
        int daysToFlower;
        
        [EventSubscribe("Sowing")]
        private void OnSowing(object sender, EventArgs e) {
            dailyWaterSD = new List<double>();
            dailyTT = new List<double>();
            daysToFlower = 0;
        }
        
        [EventSubscribe("DoUpdate")]
        private void OnDoUpdate(object sender, EventArgs e) {
            if (Sorghum.IsAlive) {
               dailyWaterSD.Add( (double) sdrv.Value() );
               dailyTT.Add( (double) dttf.Value() );
               if (daysToFlower == 0 && phenology.CurrentStageName == "Flowering") {
                  daysToFlower = dailyTT.Count;
               }
            }
        }
        
        public int EnvType {
          get {
            if (daysToFlower == 0) { return(0); }
            if (daysToFlower >= dailyTT.Count) { return(0); }
            
            double accTT = 0;
            double accStress = 0;
            int period = 4;int days = 0;
            double[] avSD = new double[9];
            for(int das = daysToFlower;das > 0; das--) {
               accTT += dailyTT[das];
               accStress += Math.Min(dailyWaterSD[das],1.0);
               days++;
               if(accTT >= 100.0)    //end of one window - calculate average daily stress
               {
                   avSD[period] = accStress / days;
                   days = 0;accStress = 0;accTT = 0;
                   period--;
               }
               if(period < 0)break;
            }
            period = 5;days = 0;

            for(int das = daysToFlower + 1; das < dailyTT.Count; das++) {
               accTT += dailyTT[das];
               accStress += Math.Min(dailyWaterSD[das],1.0);
               days++;
               if(accTT >= 100.0)    //end of one window - calculate average daily stress forward in 100oCdd
               {
                   avSD[period] = accStress / days;
                   days = 0;accStress = 0;accTT = 0;
                   period++;
               }
               if(period > 8)break;
            }
            
            // see which class is closest to this line by adding up the squares of the distances
            // at each point
            // Australian Sorghum.
            double[,] sdIndex = new double[,]{
        {0.9994660,0.9877131,0.9627857,0.9479593,0.9497890,0.9526913,0.9543730,0.9702138,0.9717316},
        {0.9986755,0.9777828,0.9336676,0.9052058,0.9042635,0.9007016,0.8298966,0.6586733,0.5532561},
        {0.9926408,0.8824799,0.6839383,0.5238767,0.4114531,0.4135201,0.5787614,0.8622198,0.8936729},
        {0.9944262,0.9038232,0.6964455,0.4601622,0.3360969,0.3294746,0.3231550,0.2993245,0.4153366},
        {0.9981921,0.9688293,0.9035107,0.8408004,0.7362116,0.5745088,0.4196704,0.3369962,0.3818236}};

            List<double> distances = new List<double>();
            for(int i=0;i < 5;i++)
            {
               double dist =0.0;
               for(int j=0;j < 9;j++)
                  dist += (sdIndex[i,j] - avSD[j]) * (sdIndex[i,j] - avSD[j]);
               distances.Add(dist);
            }
    
            return minIndx(distances) + 1;
          }
          set{}
        }
        int minIndx(List<double> distances)
        {
            // return the index (0 - n) of the lowest value in the vector
            double minValue = 10e10;
            int indx = 0;
            for(int i=0;i < distances.Count; i++)
            {
                if(distances[i] < minValue)
                {
                    minValue = distances[i];
                    indx = i;
                }
            }
            return indx;
         }
    }
}
```
        Manager Flowering
```csharp
using APSIM.Shared.Utilities;
using System.Xml.Serialization;
using Models;
using Models.PMF;
using Models.Soils;
using System.Text;
using System.Collections.Generic;
using Models.Core;
using System;
using Models.PMF.Organs;
using Models.PMF.Interfaces;
using Models.Functions;
using Models.Interfaces;




namespace Models
{
    [Serializable]
    public class Script : Model
    {
        [Link] Clock clock;
        [Link] Zone zone;
        [Link] Summary summary;
        [Link] Plant Sorghum;
        [Link] IPlant Sorg;
//        [Link(ByName = true)] private Plant Sorghum;
//        [Link(Type = LinkType.Path, Path = "[Sorghum].Stem.Biomass")] private VariableReference stemWt;
//        [Link(Type = LinkType.Path, Path = "[Sorghum].Stem")] private Organ stem;


        [Separator("FloweringVariables")]
        [Separator("   ")]
        
        public double laiAnth{ get; set; }
        public double biomassAnth{ get; set; }
        public double leafWtAnth{ get; set; }
        public double stemWtAnth{ get; set; }
        
        public double eswSowing{ get; set; }
        public int season{ get; set; }
       
        [EventSubscribe("Sowing")]
        private void OnSowing(object sender, EventArgs e)
        {
        // reset varaibles at Sowing
           if (clock.Today.Month < 6) 
              season = clock.Today.Year - 1;
           else
              season = clock.Today.Year;   
           reset();
        }

        [EventSubscribe("Flowering")]
        private void OnFlowering(object sender, EventArgs e)
        {
        // record varaibles at flowering
           laiAnth = Sorghum.Leaf.LAI;
           biomassAnth = Sorghum.AboveGround.Wt ;
          // leafWtAnth = Sorghum.structure.
          // stemWtAnth = stemWt.Value();
           
        }
                
        private void reset()
        {
           laiAnth = 0.0;
           biomassAnth = 0.0;
           leafWtAnth = 0.0;
           stemWtAnth = 0.0;
        }
    }
}
```
        Report SowingReport: VariableNames=[Clock].Today; EventNames=[Sorghum].Sowing
    Factors
      Permutation Southern QLD
        Factor Sowing
          CompositeFactor Early: Specifications=[Fixed Sowing].Script.SowingDate= 15-nov
        Factor Site
          CompositeFactor Dalby_GC150M
            Specifications:
              [Weather]
              [Soil]
            Weather Dalby
              FileName=C:\Users\uqgdurri\OneDrive - The University of Queensland\Desktop\PhD\ET Characterisation\Weather Data\Dalby.sim
            Soil GC150M: SoilType=GC150M; LocalName=GC150M; Site=GC150M; NearestTown=Unknown; Region=1; NaturalVegetation=Unknown; Latitude=0; Longitude=0
              Water: Thickness=[150, 150, 300, 300, 300, 300]; InitialValues=[0.44, 0.45, 0.323, 0.25, 0.29, 0.34]; RelativeTo=LL15; FilledFromTop=true
              Physical
                Thickness  BD    AirDry  LL15  DUL   SAT
                150        1.28  0.1     0.21  0.44  0.49
                150        1.26  0.19    0.21  0.45  0.5
                300        1.32  0.22    0.22  0.42  0.47
                300        1.34  0.25    0.25  0.41  0.46
                300        1.36  0.29    0.29  0.41  0.46
                300        1.35  0.34    0.34  0.41  0.46
                SoilCrop sorghumSoil: LL=[0.21, 0.21, 0.22, 0.25, 0.29, 0.34]; KL=[0.08, 0.08, 0.06, 0.04, 0.04, 0.04]; XF=[1, 1, 1, 1, 1, 1]
              WaterBalance SoilWater: SummerDate=1-Nov; SummerU=6; SummerCona=3.5; WinterDate=1-Apr; WinterU=6; WinterCona=3.5; DiffusConst=40; DiffusSlope=16; Salb=0.13; CN2Bare=83; CNRed=20; CNCov=0.8; DischargeWidth=5; CatchmentArea=10; PSIDul=-100; Thickness=[150, 150, 300, 300, 300, 300]; SWCON=[0.1, 0.1, 0.1, 0.1, 0.1, 0.1]
              Organic: FOMCNRatio=20; CarbonUnits=Total
                Thickness  Carbon  SoilCNRatio  FBiom  FInert  FOM
                150        1.24    12.5         0.03   0.4     390.598
                150        1.24    12.5         0.02   0.6     289.362
                300        1.25    12.5         0.01   0.8     158.805
                300        1.1     12.5         0.01   0.9     87.154
                300        0.71    12.5         0.01   0.95    47.831
                300        0.34    12.5         0.01   0.95    26.25
              Chemical: Thickness=[150, 150, 300, 300, 300, 300]; PH=[7, 7, 7, 7, 7, 7]; PHUnits=Water
              Nutrient
              CERESSoilTemperature
              Solute NO3: Thickness=[1800]; InitialValues=[3]; InitialValuesUnits=ppm; WaterTableConcentration=0; D0=0; DepthConstant=0; MaxDepthSoluteAccessible=0; RunoffEffectivenessAtMovingSolute=0; MaxEffectiveRunoff=0
              Solute NH4: Thickness=[1800]; InitialValues=[1]; InitialValuesUnits=ppm; WaterTableConcentration=0; D0=0; DepthConstant=0; MaxDepthSoluteAccessible=0; RunoffEffectivenessAtMovingSolute=0; MaxEffectiveRunoff=0
              Solute Urea: Thickness=[1800]; InitialValues=[0]; InitialValuesUnits=ppm; WaterTableConcentration=0; D0=0; DepthConstant=0; MaxDepthSoluteAccessible=0; RunoffEffectivenessAtMovingSolute=0; MaxEffectiveRunoff=0
          CompositeFactor Dalby_Vert180
            Specifications:
              [Weather]
              [Soil]
            Weather Dalby
              FileName=C:\Users\uqgdurri\OneDrive - The University of Queensland\Desktop\PhD\ET Characterisation\Weather Data\Dalby.sim
            Soil Vert180: SoilType=SouthVertosol_290mm; LocalName=SouthVertosol_290mm; Site=SQ; NearestTown=Unknown; Region=SQ; NaturalVegetation=Unknown; Latitude=0; Longitude=0
              Water: Thickness=[150, 150, 300, 300, 300, 300, 300]; InitialValues=[0.51, 0.5, 0.425, 0.31, 0.32, 0.33, 0.34]; RelativeTo=LL15; FilledFromTop=true
              Physical
                Thickness  BD    AirDry  LL15  DUL   SAT
                150        0.99  0.1     0.29  0.51  0.6
                150        1.06  0.15    0.3   0.5   0.57
                300        1.13  0.25    0.3   0.5   0.54
                300        1.11  0.31    0.31  0.5   0.55
                300        1.12  0.32    0.32  0.49  0.55
                300        1.15  0.33    0.33  0.49  0.53
                300        1.19  0.34    0.34  0.49  0.52
                SoilCrop sorghumSoil: LL=[0.29, 0.3, 0.3, 0.31, 0.32, 0.33, 0.34]; KL=[0.08, 0.08, 0.08, 0.08, 0.06, 0.04, 0.02]; XF=[1, 1, 1, 1, 1, 1, 1]
              WaterBalance SoilWater: SummerDate=1-Nov; SummerU=6; SummerCona=3.5; WinterDate=1-Apr; WinterU=6; WinterCona=3.5; DiffusConst=40; DiffusSlope=16; Salb=0.13; CN2Bare=73; CNRed=20; CNCov=0.8; DischargeWidth=5; CatchmentArea=10; PSIDul=-100; Thickness=[150, 150, 300, 300, 300, 300, 300]; SWCON=[0.5, 0.5, 0.5, 0.5, 0.5, 0.5, 0.5]
              Organic: FOMCNRatio=50; CarbonUnits=Total
                Thickness  Carbon  SoilCNRatio  FBiom  FInert  FOM
                150        1       12.5         0.03   0.4     347.129
                150        0.5     12.5         0.01   0.5     270.344
                300        0.25    12.5         0      0.6     163.972
                300        0.11    12.5         0      0.7     99.454
                300        0.11    12.5         0      0.9     60.322
                300        0.11    12.5         0      0.95    36.587
                300        0.11    12.5         0      0.95    22.191
              Chemical: Thickness=[150, 150, 300, 300, 300, 300, 300]; PH=[8.2, 8.7, 8.9, 8.1, 8, 8, 8]; PHUnits=Water
              Nutrient
              CERESSoilTemperature
              Solute NO3: Thickness=[1800]; InitialValues=[3]; InitialValuesUnits=ppm; WaterTableConcentration=0; D0=0; DepthConstant=0; MaxDepthSoluteAccessible=0; RunoffEffectivenessAtMovingSolute=0; MaxEffectiveRunoff=0
              Solute NH4: Thickness=[1800]; InitialValues=[1]; InitialValuesUnits=ppm; WaterTableConcentration=0; D0=0; DepthConstant=0; MaxDepthSoluteAccessible=0; RunoffEffectivenessAtMovingSolute=0; MaxEffectiveRunoff=0
              Solute Urea: Thickness=[1800]; InitialValues=[0]; InitialValuesUnits=ppm; WaterTableConcentration=0; D0=0; DepthConstant=0; MaxDepthSoluteAccessible=0; RunoffEffectivenessAtMovingSolute=0; MaxEffectiveRunoff=0
          CompositeFactor Dalby_BE80H
            Specifications:
              [Weather]
              [Soil]
            Weather Dalby
              FileName=C:\Users\uqgdurri\OneDrive - The University of Queensland\Desktop\PhD\ET Characterisation\Weather Data\Dalby.sim
            Soil BE80H: SoilType=BE80H; LocalName=BE80H; Site=BE80H; NearestTown=Unknown; Region=1; NaturalVegetation=Unknown; Latitude=0; Longitude=0
              Water: Thickness=[150, 150, 300, 300]; InitialValues=[0.41, 0.4, 0.384, 0.25]; RelativeTo=LL15; FilledFromTop=true
              Physical
                Thickness  BD    AirDry  LL15  DUL   SAT
                150        1.3   0.1     0.21  0.41  0.48
                150        1.32  0.18    0.22  0.4   0.46
                300        1.32  0.22    0.24  0.39  0.47
                300        1.39  0.23    0.25  0.38  0.45
                SoilCrop sorghumSoil: LL=[0.21, 0.22, 0.24, 0.25]; KL=[0.08, 0.08, 0.06, 0.04]; XF=[1, 1, 1, 1]
              WaterBalance SoilWater: SummerDate=1-Nov; SummerU=6; SummerCona=3.5; WinterDate=1-Apr; WinterU=6; WinterCona=3.5; DiffusConst=40; DiffusSlope=16; Salb=0.13; CN2Bare=73; CNRed=20; CNCov=0.8; DischargeWidth=5; CatchmentArea=10; PSIDul=-100; Thickness=[150, 150, 300, 300]; SWCON=[0.3, 0.3, 0.3, 0.3]
              Organic: FOMCNRatio=20; CarbonUnits=Total
                Thickness  Carbon  SoilCNRatio  FBiom  FInert  FOM
                150        1.2     14.5         0.03   0.4     523.082
                150        1.2     14.5         0.02   0.6     317.265
                300        1.2     14.5         0.01   0.8     116.715
                300        1.1     14.5         0.01   0.9     42.9372
              Chemical: Thickness=[150, 150, 300, 300]; PH=[7, 7, 7, 7]; PHUnits=Water
              Nutrient
              CERESSoilTemperature
              Solute NO3: Thickness=[1800]; InitialValues=[3]; InitialValuesUnits=ppm; WaterTableConcentration=0; D0=0; DepthConstant=0; MaxDepthSoluteAccessible=0; RunoffEffectivenessAtMovingSolute=0; MaxEffectiveRunoff=0
              Solute NH4: Thickness=[1800]; InitialValues=[1]; InitialValuesUnits=ppm; WaterTableConcentration=0; D0=0; DepthConstant=0; MaxDepthSoluteAccessible=0; RunoffEffectivenessAtMovingSolute=0; MaxEffectiveRunoff=0
              Solute Urea: Thickness=[1800]; InitialValues=[0]; InitialValuesUnits=ppm; WaterTableConcentration=0; D0=0; DepthConstant=0; MaxDepthSoluteAccessible=0; RunoffEffectivenessAtMovingSolute=0; MaxEffectiveRunoff=0
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